// SBML level 2 version 4

function L_PFK(L, CiATP, KiATP, CAMP, KAMP, CF26BP, KF26BP, CF16BP, KF16BP, AT, AM, F16, F26)
  L*((1 + CiATP*(AT/KiATP))/(1 + AT/KiATP))^2*((1 + CAMP*(AM/KAMP))/(1 + AM/KAMP))^2*((1 + CF26BP*F26/KF26BP + CF16BP*F16/KF16BP)/(1 + F26/KF26BP + F16/KF16BP))^2;
end

function R_PFK(KmF6P, KmATP, g, AT, F6)
  1 + F6/KmF6P + AT/KmATP + g*(F6/KmF6P)*(AT/KmATP);
end

function T_PFK(CATP, KmATP, AT)
  1 + CATP*(AT/KmATP);
end

model Teusink2000_Glycolysis()

  // Compartments:
  compartment extracellular = 1;
  compartment cytosol in extracellular = 1;
  compartment mitochondrion = 1; mitochondrion is "Mitochondrial Matrix";

  // Species:
  species GLCi in cytosol = 0.087;
  species G6P in cytosol = 2.45;
  species F6P in cytosol = 0.62;
  species F16P in cytosol = 5.51;
  species TRIO in cytosol = 0.96;
  species BPG in cytosol = 0;
  species P3G in cytosol = 0.9;
  species P2G in cytosol = 0.12;
  species PEP in cytosol = 0.07;
  species PYR in cytosol = 1.85;
  species ACE in cytosol = 0.17;
  species P in cytosol = 6.31;
  species NAD in cytosol = 1.2;
  species NADH in cytosol = 0.39;
  species AMPK_active in cytosol;
  species $Glyc in cytosol = 0;
  species $Trh in cytosol = 0;
  species $CO2 in cytosol = 1;
  species $SUCC in cytosol = 0;
  species $GLCo in extracellular = 50;
  species $ETOH in cytosol = 5;
  species $GLY in cytosol = 0.15;
  species ATP in cytosol = 1.5;
  species ADP in cytosol = 2.1;
  species AMP in cytosol = 0.5;
  species SUM_P in cytosol;
  species $F26BP in cytosol = 0.02;
  species PYR_m in mitochondrion = 0.1;
  species AcCoA_m in mitochondrion = 0.05;
  species OAA_m in mitochondrion = 0.01;
  species Cit_m in mitochondrion = 0.5;
  species IsoCit_m in mitochondrion = 0.05;
  species aKG_m in mitochondrion = 0.1;
  species SuccCoA_m in mitochondrion = 0.01;
  species Succ_m in mitochondrion = 0.1;
  species Fum_m in mitochondrion = 0.05;
  species Mal_m in mitochondrion = 0.1;
  species CoA_m in mitochondrion = 0.5;
  species FAD_m in mitochondrion = 0.5;
  species FADH2_m in mitochondrion = 0.05;
  species $CO2_m in mitochondrion = 1;
  species iP_m in mitochondrion = 2.44;
  species NAD_m in mitochondrion = 1.2;
  species NADH_m in mitochondrion = 0.39;
  species ATP_m in mitochondrion = 1.5;
  species ADP_m in mitochondrion = 2.1;
  species $O2_m in mitochondrion = 1;
  species $H_m in mitochondrion = 1;
  species $H in cytosol = 1;
  species $H2O_m in mitochondrion = 1;
  species ROS_m in mitochondrion = 0;

  // Parameters:
  gR = 5.12 dimensionless;
  KmPFKF6P = 0.1 mM;
  KmPFKATP = 0.71 mM;
  Lzero = 0.66 dimensionless;
  CiPFKATP = 100 dimensionless;
  KiPFKATP = 0.65 mM;
  CPFKAMP = 0.0845 dimensionless;
  KPFKAMP = 0.0995 mM;
  CPFKF26BP = 0.0174 dimensionless;
  KPFKF26BP = 0.000682 mM;
  CPFKF16BP = 0.397 dimensionless;
  KPFKF16BP = 0.111 mM;
  CPFKATP = 3 dimensionless;
  KeqAK = 0.45 dimensionless;
  KeqTPI = 0.045 dimensionless;
  toggle_vAK = 1;
  toggle_vATP = 1;
  toggle_vGLK = 1;
  K_AMPK = 1 dimensionless;
  kETC = 60 per_min;
  Km_NADH_m = 0.1 mM;
  Km_O2_m = 0.1 mM;
  kETC_FADH2 = 30 per_min;
  Km_FADH2_m = 0.1 mM;
  Km_O2_FADH2 = 0.1 mM;
  kATPsyn = 70 per_mM_per_min;
  Km_ADP_m = 0.1 mM;
  Km_iP_m = 0.1 mM;
  Km_H_m = 0.1 mM;
  kANT = 70 per_s;

  // Assignment rules:
  SUM_P := ATP + ADP + AMP;
  AMPK_active := 1/(1 + ATP/(AMP*K_AMPK));

  // Reactions:
  vGLK: GLCi + ATP -> G6P + ADP; toggle_vGLK*cytosol*VmGLK*(1 - AMPK_active*0.5)*GLCi*ATP*(1/((KmGLKGLCi + GLCi)*(1 + G6P/Ki_G6P)));
    VmGLK = 5 mMpermin; KmGLKGLCi = 0.08 mM; KmGLKATP = 0.15 mM; Ki_G6P = 0.2 mM;
  vPGI: G6P -> F6P; cytosol*VmPGI_2/KmPGIG6P_2*(G6P - F6P/KeqPGI_2)/(1 + G6P/KmPGIG6P_2 + F6P/KmPGIF6P_2);
    VmPGI_2 = 339.677 mMpermin; KmPGIG6P_2 = 1.4 mM; KeqPGI_2 = 0.314 dimensionless; KmPGIF6P_2 = 0.3 mM;
  vGLYCO: G6P + P => $Glyc; cytosol*KGLYCOGEN_3;
    KGLYCOGEN_3 = 6 mMpermin;
  vTreha: 2 G6P + P => $Trh; cytosol*KTREHALOSE;
    KTREHALOSE = 2.4 mMpermin;
  vPFK: F6P + ATP => F16P + ADP; cytosol*VmPFK*gR*(F6P/KmPFKF6P)*(ATP/(KmPFKATP + ATP))*R_PFK(KmPFKF6P, KmPFKATP, gR, ATP, F6P)/1*0.3*AMPK_active;  // modifiers: AMP, F26BP
    VmPFK = 182.903 mMpermin;
  vAK: 2 ADP -> ATP + AMP; toggle_vAK*(kf_AK*ADP^2 - kr_AK*ATP*AMP);
    kf_AK = 10 permin; kr_AK = 5 mMpermin;
  vATPsink: ATP => ADP + P; 0.5;
  vALD: F16P -> 2 TRIO; cytosol*VmALD/KmALDF16P*(F16P - KeqTPI/(1 + KeqTPI)*TRIO*(1/(1 + KeqTPI))*TRIO/KeqALD)/(1 + F16P/KmALDF16P + KeqTPI/(1 + KeqTPI)*TRIO/KmALDGAP + 1/(1 + KeqTPI)*TRIO/KmALDDHAP + KeqTPI/(1 + KeqTPI)*TRIO*(1/(1 + KeqTPI))*TRIO/(KmALDGAP*KmALDDHAP) + F16P*(KeqTPI/(1 + KeqTPI))*TRIO/(KmALDGAPi*KmALDF16P));
    VmALD = 322.258 mMpermin; KmALDF16P = 0.3 mM; KeqALD = 0.069 dimensionless; KmALDGAP = 2 mM; KmALDDHAP = 2.4 mM; KmALDGAPi = 10 mM;
  vGAPDH: TRIO + NAD -> BPG + NADH; cytosol*(VmGAPDHf*(KeqTPI/(1 + KeqTPI))*TRIO*NAD/(KmGAPDHGAP*KmGAPDHNAD) - VmGAPDHr*BPG*NADH/(KmGAPDHBPG*KmGAPDHNADH))/((1 + KeqTPI/(1 + KeqTPI)*TRIO/KmGAPDHGAP + BPG/KmGAPDHBPG)*(1 + NAD/KmGAPDHNAD + NADH/KmGAPDHNADH));
    VmGAPDHf = 1184.52 mMpermin; KmGAPDHGAP = 0.21 mM; KmGAPDHNAD = 0.09 mM; VmGAPDHr = 6549.8 mMpermin; KmGAPDHBPG = 0.0098 mM; KmGAPDHNADH = 0.06 mM;
  vPGK: BPG -> P3G + P; cytosol*VmPGK/(KmPGKP3G*KmPGKATP)*(KeqPGK*BPG*ADP - P3G*ATP)/((1 + BPG/KmPGKBPG + P3G/KmPGKP3G)*(1 + ATP/KmPGKATP + ADP/KmPGKADP));  // modifiers: ATP, ADP
    VmPGK = 1306.45 mMpermin; KmPGKP3G = 0.53 mM; KmPGKATP = 0.3 mM; KeqPGK = 3200 dimensionless; KmPGKBPG = 0.003 mM; KmPGKADP = 0.2 mM;
  vPGM: P3G -> P2G; cytosol*VmPGM/KmPGMP3G*(P3G - P2G/KeqPGM)/(1 + P3G/KmPGMP3G + P2G/KmPGMP2G);
    VmPGM = 2525.81 mMpermin; KmPGMP3G = 1.2 mM; KeqPGM = 0.19 dimensionless; KmPGMP2G = 0.08 mM;
  vENO: P2G -> PEP; cytosol*VmENO/KmENOP2G*(P2G - PEP/KeqENO)/(1 + P2G/KmENOP2G + PEP/KmENOPEP);
    VmENO = 365.806 mMpermin; KmENOP2G = 0.04 mM; KeqENO = 6.7 dimensionless; KmENOPEP = 0.5 mM;
  vPYK: PEP -> PYR + P; cytosol*VmPYK/(KmPYKPEP*KmPYKADP)*(PEP*ADP - PYR*ATP/KeqPYK)/((1 + PEP/KmPYKPEP + PYR/KmPYKPYR)*(1 + ATP/KmPYKATP + ADP/KmPYKADP));  // modifiers: ATP, ADP
    VmPYK = 1088.71 mMpermin; KmPYKPEP = 0.14 mM; KmPYKADP = 0.53 mM; KeqPYK = 6500 dimensionless; KmPYKPYR = 21 mM; KmPYKATP = 1.5 mM;
  vPDC: PYR => ACE + $CO2; cytosol*VmPDC*(PYR^nPDC/KmPDCPYR^nPDC)/(1 + PYR^nPDC/KmPDCPYR^nPDC);
    VmPDC = 174.194 mMpermin; nPDC = 1.9 dimensionless; KmPDCPYR = 4.33 mM;
  vSUC: 2 ACE + 3 NAD + 4 P => 3 NADH + $SUCC; cytosol*KSUCC*ACE;
    KSUCC = 21.4;
  vGLT: $GLCo -> GLCi; VmGLT/KmGLTGLCo*(GLCo - GLCi/KeqGLT)/(1 + GLCo/KmGLTGLCo + GLCi/KmGLTGLCi + 0.91*GLCo*GLCi/(KmGLTGLCo*KmGLTGLCi));
    VmGLT = 97.264 mmolepermin; KmGLTGLCo = 1.1918 mM; KeqGLT = 1 mM; KmGLTGLCi = 1.1918 mM;
  vADH: ACE + NADH -> NAD + $ETOH; -cytosol*(VmADH/(KiADHNAD*KmADHETOH)*(NAD*ETOH - NADH*ACE/KeqADH)/(1 + NAD/KiADHNAD + KmADHNAD*ETOH/(KiADHNAD*KmADHETOH) + KmADHNADH*ACE/(KiADHNADH*KmADHACE) + NADH/KiADHNADH + NAD*ETOH/(KiADHNAD*KmADHETOH) + KmADHNADH*NAD*ACE/(KiADHNAD*KiADHNADH*KmADHACE) + KmADHNAD*ETOH*NADH/(KiADHNAD*KmADHETOH*KiADHNADH) + NADH*ACE/(KiADHNADH*KmADHACE) + NAD*ETOH*ACE/(KiADHNAD*KmADHETOH*KiADHACE) + ETOH*NADH*ACE/(KiADHETOH*KiADHNADH*KmADHACE)));
    VmADH = 50 mMpermin; KiADHNAD = 0.92 mM; KmADHETOH = 17 mM; KeqADH = 6.9e-5 dimensionless; KmADHNAD = 0.17 mM; KmADHNADH = 0.11 mM; KiADHNADH = 0.031 mM; KmADHACE = 1.11 mM; KiADHACE = 1.1 mM; KiADHETOH = 90 mM;
  vG3PDH: TRIO + NADH => NAD + $GLY; cytosol*VmG3PDH/(KmG3PDHDHAP*KmG3PDHNADH)*(1/(1 + KeqTPI)*TRIO*NADH - GLY*NAD/KeqG3PDH)/((1 + 1/(1 + KeqTPI)*TRIO/KmG3PDHDHAP + GLY/KmG3PDHGLY)*(1 + NADH/KmG3PDHNADH + NAD/KmG3PDHNAD));
    VmG3PDH = 70.15 mMpermin; KmG3PDHDHAP = 0.4 mM; KmG3PDHNADH = 0.023 mM; KeqG3PDH = 4300 dimensionless; KmG3PDHGLY = 1 mM; KmG3PDHNAD = 0.93 mM;
  vATP: P -> ; cytosol*KATPASE*toggle_vATP*(ATP/(KmATPASE + ATP))*(1/(1 + AMPK_active));  // modifiers: ATP
    KATPASE = 15 permin; KmATPASE = 0.05 mM;
  vPYR_trans: PYR -> PYR_m; kPYR_trans*(PYR - PYR_m);
    kPYR_trans = 10 per_min;
  vPDH: PYR_m + CoA_m + NAD_m => AcCoA_m + $CO2_m + NADH_m; VmPDH*PYR_m*CoA_m*NAD_m/((KmPDH_PYR + PYR_m)*(KmPDH_CoA + CoA_m)*(KmPDH_NAD + NAD_m));
    VmPDH = 100 mM_per_min; KmPDH_PYR = 0.1 mM; KmPDH_CoA = 0.01 mM; KmPDH_NAD = 0.1 mM;
  vCS: AcCoA_m + OAA_m => Cit_m + CoA_m; VmCS*AcCoA_m*OAA_m/((KmCS_AcCoA + AcCoA_m)*(KmCS_OAA + OAA_m));
    VmCS = 50 mM_per_min; KmCS_AcCoA = 0.01 mM; KmCS_OAA = 0.005 mM;
  vAcon: Cit_m -> IsoCit_m; kAcon_f*(Cit_m - IsoCit_m/KeqAcon);
    kAcon_f = 100 per_min; KeqAcon = 1 dimensionless;
  vIDH: IsoCit_m + NAD_m => aKG_m + $CO2_m + NADH_m; VmIDH*IsoCit_m*NAD_m/((KmIDH_IsoCit + IsoCit_m)*(KmIDH_NAD + NAD_m));
    VmIDH = 50 mM_per_min; KmIDH_IsoCit = 0.1 mM; KmIDH_NAD = 0.1 mM;
  vAKGDH: aKG_m + CoA_m + NAD_m => SuccCoA_m + $CO2_m + NADH_m; VmAKGDH*aKG_m*CoA_m*NAD_m/((KmAKGDH_aKG + aKG_m)*(KmAKGDH_CoA + CoA_m)*(KmAKGDH_NAD + NAD_m));
    VmAKGDH = 50 mM_per_min; KmAKGDH_aKG = 0.1 mM; KmAKGDH_CoA = 0.01 mM; KmAKGDH_NAD = 0.1 mM;
  vSCS: SuccCoA_m + ADP_m + iP_m => Succ_m + ATP_m + CoA_m; VmSCS*SuccCoA_m*ADP_m*iP_m/((KmSCS_SuccCoA + SuccCoA_m)*(KmSCS_ADP + ADP_m)*(KmSCS_iP + iP_m));
    VmSCS = 50 mM_per_min; KmSCS_SuccCoA = 0.01 mM; KmSCS_ADP = 0.1 mM; KmSCS_iP = 1 mM;
  vSDH: Succ_m + FAD_m => Fum_m + FADH2_m; VmSDH*Succ_m*FAD_m/((KmSDH_Succ + Succ_m)*(KmSDH_FAD + FAD_m));
    VmSDH = 50 mM_per_min; KmSDH_Succ = 0.5 mM; KmSDH_FAD = 0.01 mM;
  vFUM: Fum_m -> Mal_m; kFUM_f*(Fum_m - Mal_m/KeqFUM);
    kFUM_f = 100 per_min; KeqFUM = 4 dimensionless;
  vMDH: Mal_m + NAD_m -> OAA_m + NADH_m; kMDH_f*Mal_m*NAD_m - kMDH_r*OAA_m*NADH_m;
    kMDH_f = 100 per_mM_per_min; kMDH_r = 10 per_mM_per_min;
  vETC_FADH2: FADH2_m + 0.5 O2 + 3 $H => FAD_m + H2O + 6 He; vETC_FADH2_kETC_FADH2*FADH2_m;
    vETC_FADH2_kETC_FADH2 = 60 per_min;
  vETC: NADH_m + 0.5 $O2_m + 5 $H_m => NAD_m + $H2O_m + 10 $H; kETC*(NADH_m/(Km_NADH_m + NADH_m))*(O2_m/(Km_O2_m + O2_m));
  vATPsyn: ADP_m + iP_m + 3 $H => ATP_m + $H2O_m + 3 $H_m; kATPsyn*(ADP_m/(Km_ADP_m + ADP_m))*(iP_m/(Km_iP_m + iP_m))*(H/(Km_H_m + H));
  vPiH_symport: P + $H => iP_m + $H_m; kPiH*P;
    kPiH = 10 per_min;
  vANT: ATP_m + ADP -> ATP + ADP_m; kANT*(ATP_m*ADP - ATP*ADP_m);
  vROS: => ROS_m; leakFactor*kETC*(NADH_m/(Km_NADH_m + NADH_m))*(Km_O2_m/(Km_O2_m + O2_m));
    leakFactor = 0.01 dimensionless;
  vAntioxidants: ROS_m => ; ROS_clearance*ROS_m;
    ROS_clearance = 0.1 permin;

  // Unit definitions:
  unit substance = 1e-3 mole; substance is "millimole";
  unit time = 60 second; time is "minute";
  unit mM = 1e-3 mole / litre;
  unit mMpermin = 1e-3 mole / (litre * 60 second);
  unit permin = 1 / (60 second);
  unit mmolepermin = 1e-3 mole / (60 second);
end
